*Heading
** Job name: Job-1 Model name: Model-1
** Generated by: Abaqus/CAE 2021
*Preprint, echo=NO, model=NO, history=NO, contact=NO
**
** PARTS
**
*Part, name=Part-1
*Node
      1,          0.5,          0.5,           0.
      2,  0.449999988,          0.5,           0.
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*Element, type=S4R
  1,   1,   2,  23,  22
  2,   2,   3,  24,  23
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*Nset, nset=Set-1, generate
   1,  441,    1
*Elset, elset=Set-1, generate
   1,  400,    1
** Section: Section-1
*Shell Section, elset=Set-1, material=Material-1
0.00275, 5
*End Part
**
**
** ASSEMBLY
**
*Assembly, name=Assembly
**
*Instance, name=Part-1-1, part=Part-1
*End Instance
**
*Nset, nset=Set-1, instance=Part-1-1, generate
   1,  441,    1
*Elset, elset=Set-1, instance=Part-1-1, generate
   1,  400,    1
*Nset, nset=Set-2, instance=Part-1-1
   1,   2,   3,   4,   5,   6
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*Elset, elset=Set-2, instance=Part-1-1
   1,   2,   3,   4,   5,   6
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*Elset, elset=_Surf-1_SPOS, internal, instance=Part-1-1, generate
   1,  400,    1
*Surface, type=ELEMENT, name=Surf-1
_Surf-1_SPOS, SPOS
*End Assembly
**
** MATERIALS
**
*Material, name=Material-1
*Density
2700.,
*Elastic
 6.75e+10, 0.34
** ----------------------------------------------------------------
**
** STEP: Step-1
**
*Step, name=Step-1, nlgeom=NO
*Dynamic, Explicit
, 0.1
*Bulk Viscosity
0.06, 1.2
**
** BOUNDARY CONDITIONS
**
** Name: BC-1 Type: Symmetry/Antisymmetry/Encastre
*Boundary
Set-2, ENCASTRE
**
** LOADS
**
** Name: Load-4   Type: Pressure
*Dsload
Surf-1, P, 1000.
**
** OUTPUT REQUESTS
**
*Restart, write, number interval=1, time marks=NO
**
** FIELD OUTPUT: F-Output-1
**
*Output, field, variable=PRESELECT, number interval=200
**
** HISTORY OUTPUT: H-Output-1
**
*Output, history, variable=PRESELECT
*End Step
